ORIGIN := 1
Данные
x := transpose([0, 1, 2])
n := 1 .. 160
k := 2 .. 3
p := transpose([0.25, 0.5, 0.25])
# Моделировние массива из данного закона распределения
u[1] := p[1]
u[k] := u[k - 1] + p[k]
u = [0.25; 0.75; 1]
search1(u, r) :=
    i ← 1
    for j ∈ 1 .. rows(u)
        break if r < u[j]
        i ← i + 1
    i
y := runif(160, 0, 1)
transpose(y) = [
    0.705255, 0.713493, 0.885115, 0.250063, 0.388377, 0.570911, 0.939402, 0.35296, 0.0458233, 0.89961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]
X[n] := x[search1(u, y[n])]
transpose(X) = [
    1, 1, 2, 1, 1, 1, 2, 1, 0, 2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]
mean(X) = 0.9875
# Обработка массива  и построение графиков эмпирической и теоретической функций распределения
F := histogram(3, X)
F = [0.333333, 44; 1, 74; 1.66667, 42]
cum[1] := 0
cum[k] := cum[k - 1] + F[k - 1, 2]
cum[4] := 160
cum/160 = [0; 0.275; 0.7375; 1]
cumm := cum/160
Fr(y) :=
    cumm[1] if y ≤ x[1]
    cumm[2] if x[1] < y ≤ x[2]
    cumm[3] if x[2] < y ≤ x[3]
    1 if y > x[3]
Ft(y) :=
    0 if y ≤ x[1]
    u[1] if x[1] < y ≤ x[2]
    u[2] if x[2] < y ≤ x[3]
    1 if y > x[3]
cumm = [0; 0.275; 0.7375; 1]
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# Вычиление выборочных и теоретических моментов
# математическое ожидание
mean(X) = 0.9875
m := sum(x[i]*p[i], i = 1 .. 3) = 1
mμ := mean(X)
mμ = 0.9875
Дисперсия
S2 := 1/159*sum((X[i] - mμ)^2, i = 1 .. 160) = 0.540723
D := sum((x[i] - m)^2*p[i], i = 1 .. 3) = 0.5
k := 1 .. 3
δδ[k] := |cumm[k + 1] - u[k]|
δδ = [0.025; 0.0125; 0]
max(δδ) = 0.025
mμ - m = -0.0125
S2 - D = 0.0407233
