ORIGIN := 1
k := 1 .. 12
i := 0 .. 10
j := 1 .. 12
n := 120  # генерируем 120 случайных чисел, организованных в таблицу
y[:, k] := runif(10, 0, 1)
y = [
    0.956677, 0.911248, 0.174448, 0.251704, 0.946677, 0.442096, 0.21829, 0.965793, 0.148689, 0.37414, 0.225087, 0.712138;
    0.331472, 0.368478, 0.963187, 0.508767, 0.473921, 0.379048, 0.313359, 0.399582, 0.111575, 0.852541, 0.698415, 0.714112;
    0.887524, 0.211253, 0.197567, 0.987943, 0.918871, 0.557601, 0.606842, 0.335307, 0.689509, 0.743572, 0.643312, 0.70055;
    0.433279, 0.0501673, 0.0473249, 0.121743, 0.365292, 0.836645, 0.955552, 0.625404, 0.490737, 0.235621, 0.329527, 0.126395;
    0.267105, 0.248822, 0.0360453, 0.706954, 0.659702, 0.00970792, 0.386872, 0.289964, 0.653425, 0.7837, 0.320688, 0.380906;
    0.527857, 0.144894, 0.0823838, 0.294749, 0.507389, 0.0406257, 0.237088, 0.898666, 0.639896, 0.563207, 0.162975, 0.864123;
    0.794121, 0.608117, 0.568955, 0.52511, 0.279802, 0.255963, 0.592442, 0.328176, 0.830578, 0.12426, 0.276458, 0.495149;
    0.486689, 0.196852, 0.218874, 0.517214, 0.791271, 0.707594, 0.0165569, 0.460345, 0.877946, 0.413796, 0.236214, 0.67177;
    0.55903, 0.761762, 0.304598, 0.82921, 0.858116, 0.133073, 0.916707, 0.412778, 0.962262, 0.170976, 0.62484, 0.349596;
    0.34717, 0.636469, 0.411259, 0.103653, 0.463848, 0.856775, 0.224469, 0.120992, 0.725697, 0.241251, 0.582802, 0.764252
]
# генерируем выборку из распределения Парето с параметрами
x0 := 50
α := 25
x[:, k] := x0/(1 - y[:, k])^(1/α)
x = [
    56.6893, 55.0862, 50.3849, 50.5833, 56.2203, 51.1809, 50.495, 57.2276, 50.323, 50.9461, 50.5126, 52.5536;
    50.8119, 50.9277, 57.0598, 51.4421, 51.3013, 50.9621, 50.7576, 51.0307, 50.2372, 53.9788, 52.4558, 52.5681;
    54.5667, 50.4769, 50.4422, 59.6651, 55.2844, 51.658, 51.9024, 50.8236, 52.3948, 52.7973, 52.1049, 52.4707;
    51.1488, 50.103, 50.0971, 50.2603, 50.9175, 53.7582, 56.6312, 52.0029, 51.368, 50.5403, 50.806, 50.271;
    50.6254, 50.5755, 50.0735, 52.5161, 52.203, 50.0195, 50.988, 50.6896, 52.1649, 53.1579, 50.7794, 50.9683;
    51.5237, 50.314, 50.1722, 50.7033, 51.4363, 50.083, 50.5442, 54.7949, 52.085, 51.6843, 50.3571, 54.1557;
    53.263, 51.9091, 51.7117, 51.5117, 50.6608, 50.5948, 51.8278, 50.8019, 53.6798, 50.2661, 50.6514, 51.3858;
    51.3517, 50.4404, 50.4965, 51.4778, 53.2337, 52.5207, 50.0334, 51.249, 54.3886, 51.0797, 50.5419, 52.2785;
    51.6647, 52.9529, 50.7318, 53.6626, 54.0621, 50.2864, 55.2263, 51.0761, 57.0031, 50.3764, 51.9998, 50.8678;
    50.8602, 52.0653, 51.0708, 50.2193, 51.2623, 54.0417, 50.511, 50.2586, 52.6551, 50.5552, 51.7793, 52.9751
]
x = [
    56.6893, 55.0862, 50.3849, 50.5833, 56.2203, 51.1809, 50.495, 57.2276, 50.323, 50.9461, 50.5126, 52.5536;
    50.8119, 50.9277, 57.0598, 51.4421, 51.3013, 50.9621, 50.7576, 51.0307, 50.2372, 53.9788, 52.4558, 52.5681;
    54.5667, 50.4769, 50.4422, 59.6651, 55.2844, 51.658, 51.9024, 50.8236, 52.3948, 52.7973, 52.1049, 52.4707;
    51.1488, 50.103, 50.0971, 50.2603, 50.9175, 53.7582, 56.6312, 52.0029, 51.368, 50.5403, 50.806, 50.271;
    50.6254, 50.5755, 50.0735, 52.5161, 52.203, 50.0195, 50.988, 50.6896, 52.1649, 53.1579, 50.7794, 50.9683;
    51.5237, 50.314, 50.1722, 50.7033, 51.4363, 50.083, 50.5442, 54.7949, 52.085, 51.6843, 50.3571, 54.1557;
    53.263, 51.9091, 51.7117, 51.5117, 50.6608, 50.5948, 51.8278, 50.8019, 53.6798, 50.2661, 50.6514, 51.3858;
    51.3517, 50.4404, 50.4965, 51.4778, 53.2337, 52.5207, 50.0334, 51.249, 54.3886, 51.0797, 50.5419, 52.2785;
    51.6647, 52.9529, 50.7318, 53.6626, 54.0621, 50.2864, 55.2263, 51.0761, 57.0031, 50.3764, 51.9998, 50.8678;
    50.8602, 52.0653, 51.0708, 50.2193, 51.2623, 54.0417, 50.511, 50.2586, 52.6551, 50.5552, 51.7793, 52.9751
]
# строим гистограмму
max(x) = 59.6651
min(x) = 50.0195
l := trunc(1 + 3.32*log(100))
l = 7
h := (max(x) - min(x))/l
h = 1.37794
f := histogram(l, x)
p := f[:, 2]/n
f1 := p/h
int := f[:, 1]
int1 := int - h/2
int1[8] := max(x)
f = [50.7085, 65; 52.0864, 29; 53.4644, 12; 54.8423, 7; 56.2203, 3; 57.5982, 3; 58.9761, 1]
p = [0.541667; 0.241667; 0.1; 0.0583333; 0.025; 0.025; 0.00833333]
f1 = [0.393098; 0.175382; 0.072572; 0.0423337; 0.018143; 0.018143; 0.00604767]
int = [50.7085; 52.0864; 53.4644; 54.8423; 56.2203; 57.5982; 58.9761]
int1 = [50.0195; 51.3975; 52.7754; 54.1533; 55.5313; 56.9092; 58.2872; 59.6651]
# плотность теоретического закона
g1(y, α, x0) :=
    α/x0*(x0/y)^(α + 1) if y > x0
    0 otherwise
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xm := 1/n*sum(sum(x[i, j], j = 1 .. 12), i = 1 .. 10)
Mξ := □  # error: Пустой местозаполнитель.
xm = 51.8863
s2 := 1/(n - 1)*sum(sum((x[i, j] - xm)^2, j = 1 .. 12), i = 1 .. 10)
Dξ := □  # error: Пустой местозаполнитель.
s2 = 3.45681
# Эмпирическая функция распределения
ind(z) :=
    1 if z > 0
    0 otherwise
Femp(z) := sum(sum(ind(z - x[i, j])/n, j = 1 .. 12), i = 1 .. 10)
# Теоретическая функция распределения
Ft(z) :=
    1 - (x0/z)^α if z ≥ x0
    0 otherwise
# Доверительный интервал
ε := sqrt(1/(2*n)*ln(20))
ε = 0.111724
R(z) := □  # error: Пустой местозаполнитель.
Femp(z) + ε
L(z) := □  # error: Пустой местозаполнитель.
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