# Полный текст условия
0.*Импортируем*выборку*и*производим*первоначальную*обработку
i := 1 .. 12
j := 1 .. 10
ORIGIN := 1
n := 120
x := [
    -10.038, -5.731, -3.571, -4.769, -2.148, -5.876, -2.89, -5.026, -6.664, -6.096;
    0.547, -6.359, -8.738, -3.841, -3.484, -5.938, -4.247, -7.16, -2.433, -3.9;
    -1.69, -0.59, -3.802, -4.19, -1.819, -2.458, 1.452, -3.434, -5.249, -2.01;
    -4.633, -3.08, -8.746, -5.19, -3.556, -2.031, -4.076, -2.69, -4.211, -2.686;
    -3.498, -2.744, -3.635, -6.06, -4.377, -3.914, -2.641, -5.916, -4.041, -2.953;
    -6.094, -6.146, -2.992, -4.37, -0.334, -6.045, -2.156, -5.746, -2.191, -6.026;
    -2.762, -5.168, -3.052, -2.823, -6.32, -2.055, -3.915, -4.372, -0.723, -3.751;
    -4.142, -1.953, -4.221, 0.238, -2.718, -5.712, -2.016, -3.995, -7.838, -3.634;
    -3.843, -1.986, -3.188, -1.993, -6.454, -4.969, -5.13, -6.158, -2.055, -3.492;
    -5.332, -9.888, -2.272, -5.609, -3.733, -6.413, -2.637, -3.782, -4.319, -2.973;
    -4.319, -3.607, -3.343, -3.979, -2.975, -5.756, -5.843, -4.214, -6.592, -6.628;
    -1.026, -1.497, -5.495, -4.451, -3.347, -4.243, -3.505, -1.886, -3.364, -3.669
]
max(x) = 1.452
min(x) = -10.038
l := trunc(1 + 3.32*log(120))
l = 7
xm := 1/n*sum(sum(x[i, j], j = 1 .. 10), i = 1 .. 12)
xm = -4.01522
h := (max(x) - min(x))/l
s2 := 1/119*sum(sum((x[i, j] - xm)^2, j = 1 .. 10), i = 1 .. 12)
h = 1.64143
s2 = 3.91551
f := histogram(l, x)
p := f[:, 2]/120
f1 := p/h
# 1.Критическое множество для среднего  при альтернативе H2:  xm<c2
f = [-9.21729, 4; -7.57586, 2; -5.93443, 29; -4.293, 40; -2.65157, 35; -1.01014, 7; 0.631286, 3]
c2 := -3.5 - qt(0.95, 119)/sqrt(120)*sqrt(s2)
p = [0.0333333; 0.0166667; 0.241667; 0.333333; 0.291667; 0.0583333; 0.025]
f1 = [0.0203075; 0.0101538; 0.147229; 0.203075; 0.177691; 0.0355381; 0.0152306]
c2 = -3.79945
# Вывод: гипотеза H0 отвергается, так как xm=-4.015 принадлежит критичеcкому множеству
# 2. Критическое множество для ско при альтернативе H3: s2<c3
c3 := 4/119*qchisq(0.05, 119)
c3 = 3.18693
# Вывод:гипотеза H01 принимается, так как s2 = 3.91551не принадлежит критическому множеству
int := f[:, 1]
int1 := int - h/2
int1[8] := max(x)
# 3. Критическое множество для среднего при альтернативе H1: xm<c3
c1 := -3.5 - qnorm(0.95, 0, 1)/sqrt(120)*2
c1 = -3.80031
int = [-9.21729; -7.57586; -5.93443; -4.293; -2.65157; -1.01014; 0.631286]
int1 = [-10.038; -8.39657; -6.75514; -5.11371; -3.47229; -1.83086; -0.189429; 1.452]
# Вывод:гипотеза отвергаетсятак как xm=-4.015 принадлежит критичеcкому множеству
# 4. ошибка второго рода критерия S1
β(c1) := 1 - pnorm((c1 + 4.0)*sqrt(120)/2, 0, 1)
β(c1) = 0.13703
# 5. Простая альтернатива с заданной ошибкой второго рода β критерия S1
a1(c1) := -(qnorm(0.9, 0, 1)*2/sqrt(120) - c1)
a1(-3.8) = -4.03398
# 6. Графики
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# По графику видно, что кривая плотности нормального закона для альтернативы H1 (a=-4) лучше ложится на гистограмму, чем в случае основной гипотезы H0 (a=-3.5), что согласуется с выводом в пункте 3.
