k := 9
m := 10
ORIGIN := 1
i := 1 .. k
j := 1 .. m
x := [
    -5.349, -3.792, -5.046, -3.602, -3.679, -4.021, -3.032, -3.54, -2.713, -3.712;
    -1.974, -3.091, -3.349, -4.723, -4.762, -5.851, -2.437, -5.524, -6.114, -3.458;
    -3.83, -4.345, -4.13, -5.538, -3.044, -2.588, -2.286, -4.786, -5.709, -2.816;
    -3.582, -6.188, -3.406, -5.882, -5.123, -1.893, -3.37, -4.028, -4.012, -3.965;
    -3.264, -3.596, -7.776, -5.917, -2.358, -3.001, -4.458, -3.801, -1.446, -5.393;
    -5.678, -1.508, -6.87, -6.385, -5.678, -2.35, -3.118, -7.268, -3.179, -5.171;
    -5.438, -4.615, -4.507, -2.725, -3.9, -2.747, -5.588, -4.371, -5.644, -6.257;
    -3.723, -3.819, -4.738, -2.694, -4.855, -2.118, -3.017, -4.533, -5.116, -5.111;
    -3.84, -6.414, -3.907, -5.969, -2.148, -5.577, -1.768, -6.511, -4.633, -4.385
]
xm := 1/(k*m)*sum(sum(x[i, j], j = 1 .. m), i = 1 .. k)
xm = -4.21303
s2 := 1/(k*m - 1)*sum(sum((x[i, j] - xm)^2, j = 1 .. m), i = 1 .. k)
α := 0.05
s2 = 1.98836
j := 1 .. k*m
σ := 1.5
a0 := -4
a1 := -4.5
# критическое множествоî: xm>c или L(kn)>C
z[j] := x[j - k*floor((j - 1)/k), 1 + floor((j - 1)/k)]
c1 := a0 + qnorm(α, 0, 1)/sqrt(k*m)*σ = -4.26007
transpose(z) = [
    -5.349, -1.974, -3.83, -3.582, -3.264, -5.678, -5.438, -3.723, -3.84, -3.792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]
β := 1 - pnorm((c1 - a1)/σ*sqrt(m*k), 0, 1) = 0.0645798
M0 := -(a1 - a0)^2/(2*σ^2) = -0.0555556
k := 9
j := 1 .. m*k
ind[j] := j - k*floor((j - 1)/k)
ind1[j] := 1 + floor((j - 1)/k)
M1 := (a1 - a0)^2/(2*σ^2) = 0.0555556
Lf(j) := product(e^(z[i]*(a1 - a0)/σ^2 + (a0^2 - a1^2)/(2*σ^2)), i = 1 .. j)
transpose(ind) = [
    1, 2, 3, 4, 5, 6, 7, 8, 9, 1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]
A := (1 - β)/α = 18.7084
B := β/(1 - α) = 0.0679788
M0ν := (α*ln(A) + (1 - α)*ln(B))/M0 = 43.3383
transpose(ind1) = [
    1, 1, 1, 1, 1, 1, 1, 1, 1, 2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]
M1ν := (β*ln(B) + (1 - β)*ln(A))/M1 = 46.1915
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# Вид критического множества совпадает с видом множества в пункте 3 задачи №5
# Тогда
c3 := c1
c2 := 90*c3 = -383.407
c1 := 90*(a0^2 - a1^2)/(2*σ^2) + c2*(a1 - a0)/σ^2 = 0.201484
c := e^c1 = 1.22322
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