k := 10
m := 10
ORIGIN := 1
i := 1 .. k
j := 1 .. m
x := [
    0.653, 6.036, 8.737, 7.239, 10.516, 5.855, 9.587, 6.918, 4.87, 5.58;
    13.884, 5.251, 2.278, 8.399, 8.845, 5.777, 7.891, 4.25, 10.159, 8.325;
    11.088, 12.462, 8.447, 7.962, 10.926, 10.128, 15.015, 8.908, 6.639, 10.687;
    7.409, 9.35, 2.267, 6.712, 8.755, 10.662, 8.106, 9.837, 7.936, 9.843;
    8.827, 9.77, 8.656, 5.626, 7.728, 8.307, 9.898, 5.805, 8.149, 9.509;
    5.582, 5.517, 9.46, 7.737, 12.783, 5.644, 10.504, 6.018, 10.462, 5.668;
    9.747, 6.74, 9.385, 9.671, 5.3, 10.632, 8.307, 7.735, 12.296, 8.511;
    8.023, 10.759, 7.924, 13.497, 9.802, 6.06, 10.68, 8.206, 3.403, 8.657;
    8.396, 10.718, 9.215, 10.708, 5.133, 6.989, 6.788, 5.502, 10.631, 8.835;
    6.535, 0.84, 10.36, 6.189, 8.534, 5.183, 9.904, 8.473, 7.802, 9.484
]
xm := 1/(k*m)*sum(sum(x[i, j], j = 1 .. m), i = 1 .. k)
xm = 8.17393
s2 := 1/(k*m - 1)*sum(sum((x[i, j] - xm)^2, j = 1 .. m), i = 1 .. k)
α := 0.1
s2 = 6.64097
j := 1 .. k*m
σ := 2.5
a0 := 7.5
a1 := 8
# критическое множествоî: xm>c или L(kn)>C
z[j] := x[j - k*floor((j - 1)/k), 1 + floor((j - 1)/k)]
c1 := a0 + qnorm(1 - α, 0, 1)/sqrt(k*m)*σ = 7.82039
transpose(z) = [
    0.653, 13.884, 11.088, 7.409, 8.827, 5.582, 9.747, 8.023, 8.396, 6.535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]
β := pnorm((c1 - a1)/σ*sqrt(m*k), 0, 1) = 0.23624
M0 := -(a1 - a0)^2/(2*σ^2) = -0.02
k := 10
j := 1 .. m*k
ind[j] := j - k*floor((j - 1)/k)
ind1[j] := 1 + floor((j - 1)/k)
M1 := (a1 - a0)^2/(2*σ^2) = 0.02
Lf(j) := product(e^(z[i]*(a1 - a0)/σ^2 + (a0^2 - a1^2)/(2*σ^2)), i = 1 .. j)
transpose(ind) = [
    1, 2, 3, 4, 5, 6, 7, 8, 9, 10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]
A := (1 - β)/α = 7.6376
B := β/(1 - α) = 0.262489
M0ν := (α*ln(A) + (1 - α)*ln(B))/M0 = 50.0241
transpose(ind1) = [
    1, 1, 1, 1, 1, 1, 1, 1, 1, 1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]
M1ν := (β*ln(B) + (1 - β)*ln(A))/M1 = 61.8402
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# Вид критического множества совпадает с видом множества в пункте 3 задачи №5
# Тогда
c3 := c1
c2 := 100*c3 = 782.039
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c1 := 100*(a0^2 - a1^2)/(2*σ^2) + c2*(a1 - a0)/σ^2 = 0.563103
c := e^c1 = 1.75611
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