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ORIGIN := 1
x := [
    3.325, 2.975, 2.382, 1.487, 2.884, 3.376, 2.375, 3.318, 1.731, 2.993;
    3.536, 2.673, 4.762, 2.886, 3.052, 3.808, 3.637, 1.372, 5.36, 3.368;
    4.286, 4.374, 2.949, 3.699, 3.658, 2.649, 3.924, 2.835, 1.611, 3.32;
    2.549, 2.962, 3.156, 3.514, 2.751, 4.221, 3.27, 3.847, 3.896, 1.604;
    5.109, 2.998, 3.169, 4.089, 5.31, 2.753, 2.743, 4.482, 2.41, 3.065;
    4.385, 1.335, 2.443, 2.351, 2.62, 3.91, 2.538, 4.764, 4.503, 1.738;
    2.252, 2.127, 4.263, 1.394, 3.581, 3.12, 1.77, 3.749, 2.533, 1.942;
    2.552, 3.249, 4.446, 3.553, 1.537, 0.82, 5.797, 2.491, 1.897, 2.112;
    2.687, 3.46, 3.547, 1.842, 3.615, 2.254, 1.891, 2.891, 3.285, 3.286;
    2.443, 4.07, 1.994, 4.786, 3.213, 1.513, 2.742, 3.626, 3.245, 3.16;
    2.179, 2.081, 2.533, 3.973, 4.063, 2.857, 1.333, 2.477, 2.231, 2.446;
    4.137, 4.006, 3.215, 2.864, 3.907, 4.818, 1.647, 3.194, 3.234, 3.203;
    3.802, 4.183, 4.851, 2.793, 2.638, 2.524, 3.778, 1.455, 2.74, 2.862;
    3.173, 3.269, 2.682, 4.315, 3.886, 4.628, 2.148, 3.035, 3.935, 3.498;
    2.738, 5.115, 2.335, 3.47, 4.651, 2.391, 2.168, 2.045, 3.589, 3.143
]
# 1. Найдите крайние члены вариационного ряда и размах выборки
n := 150  # объем выборки
max(x) = 5.797  # максимальный элемент вариационного ряда
min(x) = 0.82  # минимальный элемент вариационного ряда
w := max(x) - min(x) = 4.977  # размах выборки
# 2. Осуществите группировку данных (количество интервалов находим по правилу Стерджеса)
l := trunc(1 + log(n, 2))  # по правилу Стерджеса
l = 8  # число интервалов группировки
h := w/l = 0.622125  # ширина интервалов группировки
f := histogram(l, x)  # гистограмма
# <1> - середины интервалов;
# <2> - количество значений, попавших в интервал
f = [
    1.13106, 5;
    1.75319, 16;
    2.37531, 31;
    2.99744, 40;
    3.61956, 29;
    4.24169, 17;
    4.86381, 9;
    5.48594, 3
]
p := f[:, 2]/n
p = [0.0333333; 0.106667; 0.206667; 0.266667; 0.193333; 0.113333; 0.06; 0.02]  # эмпирическая вероятность
f1 := p/h
f1 = [0.0535798; 0.171455; 0.332195; 0.428638; 0.310763; 0.182171; 0.0964436; 0.0321479]  # высоты прямоугольников гистограммы
# 3. По сгруппированным данным постройте гистограмму относительных частот
int := f[:, 1]
int = [1.13106; 1.75319; 2.37531; 2.99744; 3.61956; 4.24169; 4.86381; 5.48594]  # середины интервалов
int1 := int - h/2
int1[9] := max(x)
int1 = [0.82; 1.44213; 2.06425; 2.68638; 3.3085; 3.93063; 4.55275; 5.17488; 5.797]  # края интервалов
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# 4. Вычислите выборочное среднее и выборочную дисперсию.
μ_1 := sum(sum(x[i, j]/n, j = 1 .. 10), i = 1 .. 15) = 3.10709  # выборочное среднее
s2 := sum(sum((x[i, j] - μ_1)^2/(n - 1), j = 1 .. 10), i = 1 .. 15) = 0.945698  # исправленная выборочная дисперсия
# 5. По виду гистограммы определите возможный закон распределения, оцените параметры этого закона по методу моментов, постройте совмещенные графики гистограммы и плотности предполагаемого закона
# По виду гистограммы можно предположить, что распределение эмпирических
# частот является нормальным законом распределения. Найдем параметры a и σ
# этого закона с помощью метода моментов.
a1 := μ_1 = 3.10709
a2 := μ_1^2 + s2^2 = 10.5483
a := μ_1 = 3.10709
σ := sqrt(a2 - a1^2) = 0.945698
y(x) := e^(-(x - a)^2/(2*σ^2))/(sqrt(2*π)*σ)
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# 6. Найдите эмпирическую функцию распределения и постройте совмещенные графики эмпирической и теоретической функций распределения
i := 1 .. 8
E[1] := 0
E[i + 1] := E[i] + p[i]
E = [0; 0.0333333; 0.14; 0.346667; 0.613333; 0.806667; 0.92; 0.98; 1]
femp(z) :=
    0 if z < min(x)
    E[1] if min(x) ≤ z < int[1]
    E[2] if int[1] ≤ z < int[2]
    E[3] if int[2] ≤ z < int[3]
    E[4] if int[3] ≤ z < int[4]
    E[5] if int[4] ≤ z < int[5]
    E[6] if int[5] ≤ z < int[6]
    E[7] if int[6] ≤ z < int[7]
    E[8] if int[7] ≤ z < int[8]
    1 if z ≥ int[8]
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# Гипотеза Н0: выборка взята из генеральной совокупности, распределенной по нормальному закону, α=0.01
# Оценка параметров a и σ (найдены по методу моментов):
a = 3.10709
σ = 0.945698
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# Вычислим статистику
# и квантиль
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k := 1 .. 8
pt[k] := pnorm(int1[k + 1], a, σ) - pnorm(int1[k], a, σ)
pt[1] := pnorm(int1[2], a, σ)
pt[8] := pnorm(50, a, σ) - pnorm(int1[8], a, σ)
pt1[k] := pt[k]*n
# Проверка
sum(pt[k], k = 1 .. 8) = 1
sum(pt1[k], k = 1 .. 8) = 150
pt = [0.0391561; 0.095919; 0.193132; 0.256121; 0.223747; 0.128752; 0.0487839; 0.0143887]
pt1 = [5.87342; 14.3879; 28.9698; 38.4181; 33.5621; 19.3128; 7.31759; 2.15831]
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XiB := sum((pt1[k] - f[:, 2][k])^2/pt1[k], k = 1 .. 6) + (pt1[7] + pt1[8] - f[:, 2][7] - f[:, 2][8])^2/(pt1[7] + pt1[8])
XiB = 2.08736
# количество степеней свободы
m := (8 - 1 - 1) - 2
# Вычисление квантили
qchisq(0.99, 4) = 13.2767
# Результат
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# Значит, можно сделать вывод, что гипотеза Н0 принимается
Графики
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